<?xml version="1.0" ?>
<Lems xmlns="http://www.neuroml.org/lems/0.7.6" xmlns:xsi="http://www.w3.org/2001/XMLSchema-instance" xsi:schemaLocation="http://www.neuroml.org/lems/0.7.6 https://raw.githubusercontent.com/LEMS/LEMS/development/Schemas/LEMS/LEMS_v0.7.6.xsd">
  <ComponentType extends="baseCellMembPotDL" name="sine_node__definition">
    <Parameter dimension="none" name="amp"/>
    <Parameter dimension="none" name="period"/>
    <Parameter dimension="none" name="dt"/>
    <Parameter dimension="none" name="two_pi"/>
    <Attachments name="only_input_port" type="basePointCurrentDL"/>
    <Exposure dimension="none" name="update_rate"/>
    <Exposure dimension="none" name="update_level"/>
    <Exposure dimension="none" name="out_port"/>
    <Exposure dimension="none" name="only_output_port"/>
    <Dynamics>
      <DerivedVariable dimension="none" exposure="V" name="V" value="0"/>
      <DerivedVariable dimension="none" exposure="update_rate" name="update_rate" value="(level * -dt*two_pi/period + rate)"/>
      <DerivedVariable dimension="none" exposure="update_level" name="update_level" value="(update_rate * dt*two_pi/period + level)"/>
      <DerivedVariable dimension="none" exposure="out_port" name="out_port" value="amp * level"/>
      <DerivedVariable dimension="none" exposure="only_output_port" name="only_output_port" value="out_port"/>
    </Dynamics>
  </ComponentType>
  <Component amp="3" dt="0.01" id="sine_node__instance" period="0.4" two_pi="6.283185" type="sine_node__definition"/>
</Lems>
