<neuroml xmlns="http://www.neuroml.org/schema/neuroml2"  xmlns:xs="http://www.w3.org/2001/XMLSchema" xmlns:xsi="http://www.w3.org/2001/XMLSchema-instance" xsi:schemaLocation="http://www.neuroml.org/schema/neuroml2 https://raw.github.com/NeuroML/NeuroML2/development/Schemas/NeuroML2/NeuroML_v2.1.xsd" id="stateful_parameter_FN">
    <notes>Generated by NeuroMLlite v0.3.2
    Generated network: stateful_parameter_FN
    Generation seed: 1234</notes>
    <include href="stateful_parameter_FN__lems.xml"/>
    <network id="stateful_parameter_FN">
        <notes>NeuroMLlite export of ModECI MDF v0.1 graph: stateful_parameter_FN</notes>
        <property tag="recommended_dt_ms" value="0.1"/>
        <property tag="recommended_duration_ms" value="2000.0"/>
        <population id="FNpop_0" component="FNpop_0__instance" size="1"/>
    </network>
</neuroml>
